*Heading
** Job name: Job-25-DYNA-EXPL Model name: Model-DYNAMIC-EXPLICIT
** Generated by: Abaqus/CAE 2025
*Preprint, echo=NO, model=NO, history=NO, contact=NO
**
** PARTS
**
*Part, name=Rigid_Substrate
*Node
      1,           0.,           0.
      2,           0.,           7.
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*Element, type=CPE4R
  1,    1,    7, 1006,  506
  2,    7,    2,    8, 1006
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*Nset, nset=Set-1, generate
    1,  1503,     1
*Elset, elset=Set-1, generate
    1,  1000,     1
** Section: Adherend
*Solid Section, elset=Set-1, material=Adherend
,
*End Part
**
*Part, name=Thin_Film
*Node
      1,   14.5165148,           1.
      2,          15.,           1.
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*Element, type=CPE4R
  1,   1,  11, 589,  45
  2,  11,  12, 590, 589
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*Nset, nset=Set-1, generate
    1,  1988,     1
*Elset, elset=Set-1, generate
    1,  1698,     1
** Section: Adhesive
*Solid Section, elset=Set-1, material=Adhesive
,
*End Part
**
*Part, name=adhesive-middle
*Node
      1,          -5.,   2.70000005
      2,  -5.19999981,   2.70000005
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*Element, type=CPE4R
  1,   1,   2, 253, 252
  2,   2,   3, 254, 253
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*Nset, nset=Set-1, generate
   1,  753,    1
*Elset, elset=Set-1, generate
   1,  500,    1
** Section: hyper-elastic
*Solid Section, elset=Set-1, material=adhesive-middle
,
*End Part
**
*Part, name=cohesive
*Node
      1,         -30.,   7.44999981
      2,  -29.7999992,   7.44999981
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*Element, type=COH2D4
  1,   1,   2, 253, 252
  2,   2,   3, 254, 253
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*Nset, nset=Set-1, generate
   1,  502,    1
*Elset, elset=Set-1, generate
   1,  250,    1
*Nset, nset=Set-2, generate
   1,  502,    1
*Elset, elset=Set-2, generate
   1,  250,    1
** Section: cohesive
*Cohesive Section, elset=Set-2, controls=EC-1, material=cohesive, response=TRACTION SEPARATION, thickness=GEOMETRY
,
*End Part
**
**
** ASSEMBLY
**
*Assembly, name=Assembly
**
*Instance, name=Rigid_Substrate-1, part=Rigid_Substrate
*End Instance
**
*Instance, name=Thin_Film-1, part=Thin_Film
        -14.,          7.3,           0.
*End Instance
**
*Instance, name=adhesive-middle-1, part=adhesive-middle
          5.,         4.55,           0.
*End Instance
**
*Instance, name=cohesive-1, part=cohesive
        -20.,        -0.45,           0.
*End Instance
**
*Instance, name=cohesive-2, part=cohesive
        -20.,         -0.2,           0.
*End Instance
**
*Node
      1,          55.,          3.5,           0.
*Node
      2,  0.800000012,   15.3000002,           0.
*Nset, nset=LOAD-POINT
 2,
*Nset, nset=Set-4
 1,
*Nset, nset=Set-5
 2,
*Nset, nset=Set-6, instance=Rigid_Substrate-1, generate
    1,  1503,     1
*Elset, elset=Set-6, instance=Rigid_Substrate-1, generate
    1,  1000,     1
*Nset, nset=Set-7
 1,
*Nset, nset=m_Set-2
 1,
*Nset, nset=m_Set-3
 2,
*Elset, elset=_m_Surf-1_S2, internal, instance=Rigid_Substrate-1, generate
   2,  500,    2
*Surface, type=ELEMENT, name=m_Surf-1
_m_Surf-1_S2, S2
*Elset, elset=_m_Surf-3_S3, internal, instance=adhesive-middle-1, generate
 251,  500,    1
*Surface, type=ELEMENT, name=m_Surf-3
_m_Surf-3_S3, S3
*Elset, elset=_m_Surf-5_S1, internal, instance=adhesive-middle-1, generate
   1,  250,    1
*Surface, type=ELEMENT, name=m_Surf-5
_m_Surf-5_S1, S1
*Elset, elset=_m_Surf-7_S4, internal, instance=Thin_Film-1, generate
  199,  1693,     6
*Surface, type=ELEMENT, name=m_Surf-7
_m_Surf-7_S4, S4
*Elset, elset=_s_Surf-1_S1, internal, instance=cohesive-1, generate
   1,  250,    1
*Surface, type=ELEMENT, name=s_Surf-1
_s_Surf-1_S1, S1
*Elset, elset=_s_Surf-3_S3, internal, instance=cohesive-1, generate
   1,  250,    1
*Surface, type=ELEMENT, name=s_Surf-3
_s_Surf-3_S3, S3
*Elset, elset=_s_Surf-5_S1, internal, instance=cohesive-2, generate
   1,  250,    1
*Surface, type=ELEMENT, name=s_Surf-5
_s_Surf-5_S1, S1
*Elset, elset=_s_Surf-7_S3, internal, instance=cohesive-2, generate
   1,  250,    1
*Surface, type=ELEMENT, name=s_Surf-7
_s_Surf-7_S3, S3
*Elset, elset=_s_Surf-9_S3, internal, instance=Rigid_Substrate-1
  499,  500,  999, 1000
*Surface, type=ELEMENT, name=s_Surf-9
_s_Surf-9_S3, S3
*Elset, elset=_s_Surf-10_S3, internal, instance=Thin_Film-1, generate
 145,  150,    1
*Surface, type=ELEMENT, name=s_Surf-10
_s_Surf-10_S3, S3
** Constraint: Constraint-1
*Tie, name=Constraint-1, adjust=yes
s_Surf-1, m_Surf-1
** Constraint: Constraint-2
*Tie, name=Constraint-2, adjust=yes
s_Surf-3, m_Surf-3
** Constraint: Constraint-3
*Tie, name=Constraint-3, adjust=yes
s_Surf-5, m_Surf-5
** Constraint: Constraint-4
*Tie, name=Constraint-4, adjust=yes
s_Surf-7, m_Surf-7
** Constraint: Constraint-5
*Coupling, constraint name=Constraint-5, ref node=m_Set-2, surface=s_Surf-9
*Kinematic
** Constraint: Constraint-6
*Coupling, constraint name=Constraint-6, ref node=m_Set-3, surface=s_Surf-10
*Kinematic
*End Assembly
**
** ELEMENT CONTROLS
**
*Section Controls, name=EC-1, ELEMENT DELETION=YES, MAX DEGRADATION=1.
1., 1., 1.
*Amplitude, name=Amp-1
             0.,              0.,              1.,              1.
**
** MATERIALS
**
*Material, name=Adherend
*Density
 2.7e-09,
*Elastic
70000., 0.3
*Material, name=Adhesive
*Density
 1.35e-09,
*Elastic
990., 0.33
*Material, name=adhesive-middle
*Density
 1.35e-09,
*Hyperelastic, arruda-boyce
 1.016, 1867., 0.152
*Material, name=cohesive
*Damage Initiation, criterion=MAXS
 3.62, 2.64, 2.64
*Damage Evolution, type=ENERGY, mixed mode behavior=BK, power=1.75
1., 0.3, 0.3
*Damage Stabilization
0.001
*Density
 1.35e-09,
*Elastic, type=TRACTION
 3.06, 1.06, 1.06
**
** BOUNDARY CONDITIONS
**
** Name: BC-3 Type: Symmetry/Antisymmetry/Encastre
*Boundary
Set-6, YSYMM
** ----------------------------------------------------------------
**
** STEP: Step-1
**
*Step, name=Step-1, nlgeom=YES
*Dynamic, Explicit
, 1.
*Bulk Viscosity
0.06, 1.2
** Mass Scaling: Semi-Automatic
**               Whole Model
*Fixed Mass Scaling, factor=1.2
**
** BOUNDARY CONDITIONS
**
** Name: BC-2 Type: Displacement/Rotation
*Boundary, amplitude=Amp-1
Set-5, 1, 1
Set-5, 2, 2, 50.
Set-5, 6, 6
** Name: BC-4 Type: Displacement/Rotation
*Boundary, amplitude=Amp-1
Set-7, 1, 1, 50.
Set-7, 2, 2
Set-7, 6, 6
**
** OUTPUT REQUESTS
**
*Restart, write, number interval=1, time marks=NO
**
** FIELD OUTPUT: F-Output-1
**
*Output, field
*Node Output, variable=PRESELECT
*Element Output, directions=YES
EVF, LE, PE, PEEQ, PEEQVAVG, PEVAVG, S, SDEG, STATUS, SVAVG
*Contact Output, variable=PRESELECT
**
** HISTORY OUTPUT: H-Output-1
**
*Output, history
*Node Output, nset=LOAD-POINT
RF2, U2
*End Step
