*Heading
** Job name: Job-35-EXPONENTIAL_SOFTENG-MIXEDMODEBEH Model name: Model-STATIC_GENERAL
** Generated by: Abaqus/CAE 2025
*Preprint, echo=NO, model=NO, history=NO, contact=NO
**
** PARTS
**
*Part, name=Rigid_Substrate
*Node
      1,           0.,           0.
      2,           0.,           7.
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*Element, type=CPE4R
    1,     1,     7, 20009, 10008
    2,     7,     8, 20010, 20009
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*Nset, nset=Set-1, generate
     1,  40004,      1
*Elset, elset=Set-1, generate
     1,  30000,      1
** Section: Adherend
*Solid Section, elset=Set-1, material=Adherend
1.,
*End Part
**
*Part, name=Thin_Film
*Node
      1,   14.5165148,           1.
      2,          15.,           1.
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*Element, type=CPE4R
   1,     1,    11, 11377,   578
   2,    11,    12, 11378, 11377
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*Nset, nset=Set-1, generate
     1,  90560,      1
*Elset, elset=Set-1, generate
     1,  84885,      1
** Section: Adhesive
*Solid Section, elset=Set-1, controls=EC-1, material=Adhesive
,
*End Part
**
**
** ASSEMBLY
**
*Assembly, name=Assembly
**
*Instance, name=Rigid_Substrate-1, part=Rigid_Substrate
*End Instance
**
*Instance, name=Thin_Film-1, part=Thin_Film
        -14.,           7.,           0.
*End Instance
**
*Node
      1,  0.800000012,          14.,           0.
*Node
      2,          55.,          3.5,           0.
*Nset, nset=Set-6, instance=Rigid_Substrate-1, generate
     1,  40004,      1
*Elset, elset=Set-6, instance=Rigid_Substrate-1, generate
     1,  30000,      1
*Nset, nset=Set-7
 1,
*Nset, nset=Set-9, instance=Rigid_Substrate-1, generate
     1,  40004,      1
*Elset, elset=Set-9, instance=Rigid_Substrate-1, generate
     1,  30000,      1
*Nset, nset=Set-10, instance=Rigid_Substrate-1, generate
     1,  40004,      1
*Elset, elset=Set-10, instance=Rigid_Substrate-1, generate
     1,  30000,      1
*Nset, nset=Set-11
 1,
*Nset, nset=Set-13
 2,
*Nset, nset=load_point
 1,
*Nset, nset=m_Set-8
 1,
*Nset, nset=m_Set-12
 2,
*Elset, elset=_m_Surf-4_S2, internal, instance=Rigid_Substrate-1, generate
     3,  15000,      3
*Surface, type=ELEMENT, name=m_Surf-4
_m_Surf-4_S2, S2
*Elset, elset=_m_Surf-7_S2, internal, instance=Rigid_Substrate-1, generate
     3,  15000,      3
*Elset, elset=_m_Surf-7_S4, internal, instance=Rigid_Substrate-1, generate
 15001,  29998,      3
*Surface, type=ELEMENT, name=m_Surf-7
_m_Surf-7_S2, S2
_m_Surf-7_S4, S4
*Elset, elset=_s_Surf-4_S2, internal, instance=Thin_Film-1, generate
   15,  9870,    15
*Elset, elset=_s_Surf-4_S4, internal, instance=Thin_Film-1, generate
  9871,  84871,     15
*Surface, type=ELEMENT, name=s_Surf-4
_s_Surf-4_S2, S2
_s_Surf-4_S4, S4
*Elset, elset=_s_Surf-6_S3, internal, instance=Thin_Film-1, generate
 7501,  7515,     1
*Surface, type=ELEMENT, name=s_Surf-6
_s_Surf-6_S3, S3
*Elset, elset=_s_Surf-7_S2, internal, instance=Thin_Film-1, generate
   15,  9870,    15
*Elset, elset=_s_Surf-7_S4, internal, instance=Thin_Film-1, generate
  9871,  84871,     15
*Surface, type=ELEMENT, name=s_Surf-7
_s_Surf-7_S2, S2
_s_Surf-7_S4, S4
*Elset, elset=_s_Surf-9_S3, internal, instance=Rigid_Substrate-1
 14998, 14999, 15000, 29998, 29999, 30000
*Surface, type=ELEMENT, name=s_Surf-9
_s_Surf-9_S3, S3
** Constraint: Constraint-2
*Coupling, constraint name=Constraint-2, ref node=m_Set-8, surface=s_Surf-6
*Kinematic
** Constraint: Constraint-3
*Coupling, constraint name=Constraint-3, ref node=m_Set-12, surface=s_Surf-9
*Kinematic
*End Assembly
**
** ELEMENT CONTROLS
**
*Section Controls, name=EC-1, hourglass=ENHANCED
1., 1., 1.
**
** MATERIALS
**
*Material, name=Adherend
*Elastic
105000., 0.3
*Material, name=Adhesive
*Elastic
1000., 0.33
**
** INTERACTION PROPERTIES
**
*Surface Interaction, name=IntProp-1
1.,
*Cohesive Behavior
100000.,100000.,100000.
*Damage Initiation, criterion=MAXS
 0.1, 0.1, 0.1
*Damage Evolution, type=ENERGY, softening=EXPONENTIAL
 0.12,
*Damage Stabilization
0.0001
**
** BOUNDARY CONDITIONS
**
** Name: BC-1 Type: Symmetry/Antisymmetry/Encastre
*Boundary
Set-6, YSYMM
**
** INTERACTIONS
**
** Interaction: Int-1
*Contact Pair, interaction=IntProp-1, small sliding, type=SURFACE TO SURFACE
s_Surf-7, m_Surf-7
** ----------------------------------------------------------------
**
** STEP: Step-1
**
*Step, name=Step-1, nlgeom=YES, inc=10000
*Static
1e-05, 10., 1e-15, 10.
**
** BOUNDARY CONDITIONS
**
** Name: BC-2 Type: Displacement/Rotation
*Boundary
Set-11, 1, 1
Set-11, 2, 2, 30.
Set-11, 6, 6
** Name: BC-3 Type: Displacement/Rotation
*Boundary
Set-13, 1, 1, 30.
Set-13, 2, 2
Set-13, 6, 6
**
** OUTPUT REQUESTS
**
*Restart, write, frequency=0
**
** FIELD OUTPUT: F-Output-1
**
*Output, field
*Node Output, variable=PRESELECT
*Element Output, directions=YES, variable=PRESELECT
*Contact Output
CDISP, CSDMG, CSMAXSCRT, CSMAXUCRT, CSTRESS
**
** HISTORY OUTPUT: H-Output-1
**
*Output, history
*Node Output, nset=load_point
RF2, U2
*End Step
