*Heading
** Job name: Job-38-COH_ELS-NEW Model name: Model-STATIC_GEN-COH_ELES
** Generated by: Abaqus/CAE 2025
*Preprint, echo=NO, model=NO, history=NO, contact=NO
**
** PARTS
**
*Part, name=Rigid_Substrate
*Node
      1,           0.,           0.
      2,           0.,           7.
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*Element, type=CPE4I
   1,    1,    7, 2006, 1006
   2,    7,    2,    8, 2006
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*Nset, nset=Set-1, generate
    1,  3003,     1
*Elset, elset=Set-1, generate
    1,  2000,     1
** Section: Adherend
*Solid Section, elset=Set-1, material=Adherend
1.,
*End Part
**
*Part, name=Thin_Film
*Node
      1,   14.5165148,           1.
      2,          15.,           1.
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*Element, type=CPE4I
  1,    1,   11, 1155,   72
  2,   11,   12, 1156, 1155
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*Nset, nset=Set-1, generate
    1,  3969,     1
*Elset, elset=Set-1, generate
    1,  3396,     1
** Section: Adhesive
*Solid Section, elset=Set-1, material=Adhesive
1.,
*End Part
**
*Part, name=cohesive
*Node
      1,         -30.,   7.30000019
      2,  -29.8999996,   7.30000019
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*Element, type=COH2D4
   1,    1,    2,  503,  502
   2,    2,    3,  504,  503
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*Nset, nset=Set-1, generate
    1,  1503,     1
*Elset, elset=Set-1, generate
    1,  1000,     1
*Nset, nset=Set-2, generate
    1,  1503,     1
*Elset, elset=Set-2, generate
    1,  1000,     1
** Section: cohesive
*Cohesive Section, elset=Set-2, controls=EC-1, material=cohesive, response=TRACTION SEPARATION, thickness=GEOMETRY
, 1.
*End Part
**
**
** ASSEMBLY
**
*Assembly, name=Assembly
**
*Instance, name=Rigid_Substrate-1, part=Rigid_Substrate
*End Instance
**
*Instance, name=Thin_Film-1, part=Thin_Film
        -14.,          7.2,           0.
*End Instance
**
*Instance, name=cohesive-1, part=cohesive
        -20.,         -0.3,           0.
*End Instance
**
*Node
      1,  0.800000012,   15.1999998,           0.
*Node
      2,          55.,          3.5,           0.
*Nset, nset=LOAD-POINT
 1,
*Nset, nset=Set-4, instance=Rigid_Substrate-1, generate
    1,  3003,     1
*Elset, elset=Set-4, instance=Rigid_Substrate-1, generate
    1,  2000,     1
*Nset, nset=Set-5
 1,
*Nset, nset=Set-6
 2,
*Nset, nset=m_Set-2
 1,
*Nset, nset=m_Set-3
 2,
*Elset, elset=_m_Surf-1_S4, internal, instance=Thin_Film-1, generate
  397,  3391,     6
*Surface, type=ELEMENT, name=m_Surf-1
_m_Surf-1_S4, S4
*Elset, elset=_m_Surf-3_S2, internal, instance=Rigid_Substrate-1, generate
    2,  1000,     2
*Surface, type=ELEMENT, name=m_Surf-3
_m_Surf-3_S2, S2
*Elset, elset=_s_Surf-1_S3, internal, instance=cohesive-1, generate
  501,  1000,     1
*Surface, type=ELEMENT, name=s_Surf-1
_s_Surf-1_S3, S3
*Elset, elset=_s_Surf-3_S1, internal, instance=cohesive-1, generate
   1,  500,    1
*Surface, type=ELEMENT, name=s_Surf-3
_s_Surf-3_S1, S1
*Elset, elset=_s_Surf-5_S3, internal, instance=Thin_Film-1, generate
 295,  300,    1
*Surface, type=ELEMENT, name=s_Surf-5
_s_Surf-5_S3, S3
*Elset, elset=_s_Surf-6_S3, internal, instance=Rigid_Substrate-1
 1999, 2000
*Surface, type=ELEMENT, name=s_Surf-6
_s_Surf-6_S3, S3
** Constraint: Constraint-3
*Coupling, constraint name=Constraint-3, ref node=m_Set-2, surface=s_Surf-5
*Kinematic
** Constraint: Constraint-4
*Coupling, constraint name=Constraint-4, ref node=m_Set-3, surface=s_Surf-6
*Kinematic
** Constraint: coh_bot
*Tie, name=coh_bot, adjust=yes
s_Surf-3, m_Surf-3
** Constraint: coh_top
*Tie, name=coh_top, adjust=yes
s_Surf-1, m_Surf-1
*End Assembly
**
** ELEMENT CONTROLS
**
*Section Controls, name=EC-1, VISCOSITY=1e-05
1., 1., 1.
**
** MATERIALS
**
*Material, name=Adherend
*Elastic
70000., 0.3
*Material, name=Adhesive
*Elastic
1000., 0.33
*Material, name=cohesive
*Damage Initiation, criterion=QUADS
 0.1, 0.1, 0.1
*Damage Evolution, type=ENERGY, mixed mode behavior=BK, power=1.75
 0.12, 0.12, 0.12
*Elastic, type=TRACTION
 3.06, 1.06, 1.06
**
** BOUNDARY CONDITIONS
**
** Name: BC-1 Type: Symmetry/Antisymmetry/Encastre
*Boundary
Set-4, YSYMM
** ----------------------------------------------------------------
**
** STEP: Step-1
**
*Step, name=Step-1, nlgeom=YES, inc=10000
*Static
1e-05, 10., 1e-15, 10.
**
** BOUNDARY CONDITIONS
**
** Name: BC-2 Type: Displacement/Rotation
*Boundary
Set-5, 1, 1
Set-5, 2, 2, 30.
Set-5, 6, 6
** Name: BC-3 Type: Displacement/Rotation
*Boundary
Set-6, 1, 1, 30.
Set-6, 2, 2
Set-6, 6, 6
**
** OUTPUT REQUESTS
**
*Restart, write, frequency=0
**
** FIELD OUTPUT: F-Output-1
**
*Output, field
*Node Output, variable=PRESELECT
*Element Output, directions=YES
LE, PE, PEEQ, PEMAG, S, STATUS
*Contact Output, variable=PRESELECT
**
** HISTORY OUTPUT: H-Output-1
**
*Output, history
*Node Output, nset=LOAD-POINT
RF2, U2
*End Step
