*Heading
** Job name: Job-41-NEW_PLOT_AIM Model name: Model-STATIC_GEN-load_on_the_nodes
** Generated by: Abaqus/CAE 2025
*Preprint, echo=NO, model=NO, history=NO, contact=NO
**
** PARTS
**
*Part, name=Rigid_Substrate
*Node
      1,           0.,           0.
      2,           0.,           7.
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*Element, type=CPE4R
    1,     1,     7, 20009, 10008
    2,     7,     8, 20010, 20009
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*Nset, nset=Set-1, generate
     1,  40004,      1
*Elset, elset=Set-1, generate
     1,  30000,      1
** Section: Adherend
*Solid Section, elset=Set-1, material=Adherend
1.,
*End Part
**
*Part, name=Thin_Film
*Node
      1,   14.5165148,           1.
      2,          15.,           1.
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*Element, type=CPE4R
   1,     1,    11, 11377,   578
   2,    11,    12, 11378, 11377
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*Nset, nset=Set-1, generate
     1,  90560,      1
*Elset, elset=Set-1, generate
     1,  84885,      1
** Section: Adhesive
*Solid Section, elset=Set-1, controls=EC-1, material=Adhesive
,
*End Part
**
**
** ASSEMBLY
**
*Assembly, name=Assembly
**
*Instance, name=Rigid_Substrate-1, part=Rigid_Substrate
*End Instance
**
*Instance, name=Thin_Film-1, part=Thin_Film
        -14.,           7.,           0.
*End Instance
**
*Nset, nset=LOAD_SET, instance=Thin_Film-1
   3,   5, 525, 526, 527, 528, 529, 530, 531, 532, 533, 534, 535, 536, 537, 538
*Elset, elset=LOAD_SET, instance=Thin_Film-1, generate
 7501,  7515,     1
*Nset, nset=Set-1, instance=Rigid_Substrate-1, generate
     1,  40004,      1
*Elset, elset=Set-1, instance=Rigid_Substrate-1, generate
     1,  30000,      1
*Nset, nset=Set-2, instance=Thin_Film-1
   3,   5, 525, 526, 527, 528, 529, 530, 531, 532, 533, 534, 535, 536, 537, 538
*Elset, elset=Set-2, instance=Thin_Film-1, generate
 7501,  7515,     1
*Elset, elset=_m_Surf-1_S2, internal, instance=Rigid_Substrate-1, generate
     3,  15000,      3
*Surface, type=ELEMENT, name=m_Surf-1
_m_Surf-1_S2, S2
*Elset, elset=_s_Surf-1_S4, internal, instance=Thin_Film-1, generate
  9871,  84871,     15
*Surface, type=ELEMENT, name=s_Surf-1
_s_Surf-1_S4, S4
*End Assembly
**
** ELEMENT CONTROLS
**
*Section Controls, name=EC-1, hourglass=ENHANCED
1., 1., 1.
*Amplitude, name=Amp-1
             0.,              0.,              1.,              1.
**
** MATERIALS
**
*Material, name=Adherend
*Elastic
210000., 0.3
*Material, name=Adhesive
*Elastic
1000., 0.33
**
** INTERACTION PROPERTIES
**
*Surface Interaction, name=IntProp-1
1.,
*Cohesive Behavior, eligibility=SPECIFIED CONTACTS, type=COUPLED
 1e+05, 1e+05, 1e+05,    0.,    0.,    0.
*Damage Initiation, criterion=MAXS
1., 1., 1.
*Damage Evolution, type=ENERGY, mixed mode behavior=BK, power=1.75
1., 1., 1.
*Damage Stabilization
0.0001
**
** BOUNDARY CONDITIONS
**
** Name: BC-1 Type: Symmetry/Antisymmetry/Encastre
*Boundary
Set-1, YSYMM
**
** INTERACTIONS
**
** Interaction: Int-1
*Contact Pair, interaction=IntProp-1
s_Surf-1, m_Surf-1
*Initial Conditions, type=CONTACT
s_Surf-1, m_Surf-1,
** ----------------------------------------------------------------
**
** STEP: Step-1
**
*Step, name=Step-1, nlgeom=YES, inc=10000
*Static
1e-05, 10., 1e-14, 10.
**
** BOUNDARY CONDITIONS
**
** Name: BC-2 Type: Displacement/Rotation
*Boundary
Set-2, 1, 1
Set-2, 2, 2, 30.
Set-2, 6, 6
**
** OUTPUT REQUESTS
**
*Restart, write, frequency=0
**
** FIELD OUTPUT: F-Output-1
**
*Output, field
*Node Output, variable=PRESELECT
*Element Output, directions=YES, variable=PRESELECT
*Contact Output
CDISP, CSDMG, CSMAXSCRT, CSMAXUCRT, CSTRESS
**
** HISTORY OUTPUT: H-Output-1
**
*Output, history
*Node Output, nset=LOAD_SET
RF2, U2
*Energy Output, elset=LOAD_SET, variable=ALL
*End Step
